*Heading
** Job name: TestRound Model name: Model-1
** Generated by: Abaqus/CAE 6.14-1
*Preprint, echo=NO, model=NO, history=NO, contact=NO
**
** PARTS
**
*Part, name=Part-1
*Node
      1,          25.,           0.,         136.
      2,          29.,           0.,         140.
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*Element, type=C3D8R
  1,  558,   21,   22,  609, 6770,  995,  963, 6821
  2,  558,  635,  627,  598, 6770, 6847, 6839, 6810
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*Nset, nset=Set-1, generate
     1,  29216,      1
*Elset, elset=Set-1, generate
     1,  26564,      1
*Orientation, name=Ori-1
          0.,           0.,           1.,           0.,           1.,           0.
3, 0.
** Section: Section-1
*Solid Section, elset=Set-1, orientation=Ori-1, material=Material-2
,
*End Part
**
**
** ASSEMBLY
**
*Assembly, name=Assembly
**
*Instance, name=Part-1-1, part=Part-1
*End Instance
**
*Nset, nset=Set-2, instance=Part-1-1
    8,  472,  473,  474,  475,  476
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*Elset, elset=Set-2, instance=Part-1-1, generate
 25962,  26564,      1
*Nset, nset=Set-3, instance=Part-1-1
    8,  472,  473,  474,  475,  476
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*Elset, elset=Set-3, instance=Part-1-1, generate
 25962,  26564,      1
*Nset, nset=Set-4, instance=Part-1-1
    8,  472,  473,  474,  475,  476
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*Elset, elset=Set-4, instance=Part-1-1, generate
 25962,  26564,      1
*Nset, nset=Set-5, instance=Part-1-1
    4,  204,  205,  206,  207,  208
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*Elset, elset=Set-5, instance=Part-1-1, generate
 4503,  5105,     1
*Nset, nset=Set-6, instance=Part-1-1
    4,  204,  205,  206,  207,  208
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*Elset, elset=Set-6, instance=Part-1-1, generate
 4503,  5105,     1
*End Assembly
**
** MATERIALS
**
*Material, name=Material-2
*Elastic
200000., 0.3
*Plastic
  318.4857,         0
  514.4800,    0.1000
  585.5094,    0.2000
  632.9397,    0.3000
  669.3400,    0.4000
  699.2042,    0.5000
  724.6961,    0.6000
  747.0362,    0.7000
  766.9852,    0.8000
  785.0517,    0.9000
  801.5936,    1.0000
*Potential
1., 1.05,  1.45, 1.25,     1.,     1.
** ----------------------------------------------------------------
**
** STEP: Step-1
**
*Step, name=Step-1, nlgeom=YES, inc=5000
*Static
0.1, 1., 1e-05, 0.2
**
** BOUNDARY CONDITIONS
**
** Name: BC-1 Type: Symmetry/Antisymmetry/Encastre
*Boundary
Set-4, PINNED
** Name: BC-2 Type: Displacement/Rotation
*Boundary
Set-5, 1, 1
Set-5, 2, 2
** Name: BC-3 Type: Displacement/Rotation
*Boundary
Set-6, 3, 3, 60.
**
** OUTPUT REQUESTS
**
*Restart, write, frequency=0
**
** FIELD OUTPUT: F-Output-1
**
*Output, field, variable=PRESELECT
**
** HISTORY OUTPUT: H-Output-1
**
*Output, history, variable=PRESELECT
*End Step
